# Mathcad spread sheet for evaluation of arc plasma parameters by Alex Khrabriy
#
# Physical constants:
kB := 1.38*10^-23*J/K  # - Boltzmann constant
ε0 := 8.85*10^-12*F/m  # - vacuum permittivity
m_e := 9.11*10^-31*kg  # - mass of electron
m_au := 1.6726*10^-27*kg  # - atomic mass unit
q_e := 1.6*10^-19*A*s  # - charge of electron
N_a := 6.02*10^23*1/mole  # - Avogadro number
h := 6.626*10^-34*m^2*kg/s  # - Plank's constant
Eion := 11.26 V  # - Carbon ionization potential
m_C := 12*m_au  # - mass of carbon atom
m_He := 4*m_au  # - mass of helium atom
d_C := 3.4*10^-10*m  # - carbon atom diameter (van der Waals)
d_He := 2.8*10^-10*m  # - helium atom diameter (van der Waals)
d_a := 3*10^-10*m  # - atomic diameter
S_ia := 5*10^-19*m^2  # - carbon ions cahrge-exchange cross section (B. Smirnov)
S_eC := 2*10^-19*m^2  # - cross section electron - carbon atom
S_eHe := 6*10^-20*m^2  # - cross section electron - helium atom
# Kinetic coefficients (appox. values): | (from Almeida's paper, appendix)
C_therm := 2.5
Cea := 0.75
Cei := 0.5
Cia := 1
# Put equation here
# Input parameters of the arc:
p := 0.68 atm  # - background pressure
T_h := 7000 K  # - temperature of heavy particles
T_e := 10000 K  # - electron temperature
Cc := 0.5  # - carbon gas molar fraction (assumed as a parameter here).
j := 3*10^6*A/m^2  # - current density (positive - cathode, negative - anode)
v := 10*m/s  # - flow velocity
# Basic parameters of the gas mixure:
n := p/(kB*T_h)  # - number density of all particles (appox. of all heavy particles (low ionization rate))
n_C := n*Cc  # - number density of carbon atoms
n_He := n - n_C  # - number density of Helium atoms
Cm := n_C*m_C/(n_C*m_C + n_He*m_He) = 0.75  # - carbon gas mass fraction
ρ := n_C*m_C + n_He*m_He = 0.009544 kg/m^3  # - gas density
# Ionization/recombination coeffs. for carbon atoms from Annaloro et.al., 2012:
A_ion_C := 9.72*10^-3
alpha_ion_C := -2.074
T_ion_C := 127510*K
a_i_C := A_ion_C*(T_e/K)^alpha_ion_C*exp(-T_ion_C/T_e)*m^3/s = 1.42553e-16 m^3/s  # - ionization rate constant
A_recomb_C := 4.27*10^-29
alpha_r_C := -2.487
T_r_C := -12260*K
b_i_C := A_recomb_C*(T_e/K)^alpha_r_C*exp(-T_r_C/T_e)*m^6/s = 1.64011e-38 m^6/s
# Ionization rate (Saha):  α(n-2n_e)=βn_e^3.
n_Saha := sqrt(n_C*a_i_C/b_i_C + (a_i_C/b_i_C)^2) - a_i_C/b_i_C = 4.76578e19 1/L  # - electron number density
Saha_RHS := (2*π*m_e*kB*T_e/h^2)^(3/2)*exp(-q_e*Eion/(kB*T_e)) = 5.16257e18 1/L
n_Saha_true := (-Saha_RHS + sqrt(Saha_RHS^2 + 4*n*Saha_RHS))/2 = 5.81552e19 1/L
α := n_Saha/n_C = 0.133634  # - ionization degree
n_a := n - n_Saha
# For later computations suppose:
n_e := n_Saha
# Coulomb collisions cross-section:
R_D := sqrt(ε0*kB*T_e/(n_e*q_e^2)) = 3.16391e-8 m  # - Debye radius in plasma
R_D_check := 7.43 m*(T_e/(11600 K))^(1/2)*(n_e/(1 cm^-3))^(-1/2) = 3.16004e-8 m  # - NRL plasma formulary, p.28
k_e := 1/R_D = 31606464 1/m
Λ := 8*π*ε0*kB*T_e/(q_e^2*k_e) = 37.9355
ln(Λ) = 3.63589
# - Coulomb logarithm
ln_Λ_check := 23 - ln((n_e/(1 cm^-3))^(1/2)*(T_e/(11600 K))^(-3/2)) = 3.57596  # - NRL plasma formulary, p.34
Λ_check := 1.24*10^7*(T_e/(1 K))^(3/2)*(n_e/(1 m^-3))^(-1/2) = 56.8008  # - after eq. (47) in Almeida... paper
ln_Λ_check2 := ln(Λ_check) = 4.03955
S_ei := q_e^4*ln(Λ)/(32*π*ε0^2*(kB*T_e)^2)
S_ei*10^20 = 1589.08 m^2  # - Electron-ions collision cross section
S_ia*10^20 = 50 m^2
# Diffusion coefficients and mobilities:
D_i := 3*π/32*sqrt(8*kB*T_h/(π*m_C/2))/(n_C*S_ia) = 0.00817748 m^2/s
# - diffusion coefficient of ions in carbon (assume all atoms are carbon and neglecting role of electrons)
# - formula (45) for binary diffusion coef. from Almeida, Benilov, Naidis, 2008
# More accurate relation (taking electrons into account):
# Relation from Rozhansky & Tsendin's book (eq. 2.89):
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# Calculation:
D_i_acc := kB*T_h/(4/3*m_C/2*n_C*S_ia*sqrt(8*kB*T_h/(π*m_C/2)))*(1 + T_e/T_h*Cei*n_e*S_ei/(Cei*n_e*S_ei + Cea*n_C*S_eC)) = 0.0184135 m^2/s
# Simplified form:
D_i_acc_ := 3*π/32*sqrt(8*kB*T_h/(π*m_C/2))/(n_C*S_ia)*(1 + T_e/T_h*Cei*n_e*S_ei/(Cei*n_e*S_ei + Cea*n_C*S_eC)) = 0.0184135 m^2/s
μ_i := n_C*S_eC*Cea/(n_C*S_eC*Cea + n_e*S_ei*Cei)*D_i*n/n_C*q_e/(kB*T_h*Cia) = 0.00335322 1/T  # (m^2/(V s))
# - mobility of carbon ions (assume all atoms are carbon)
# (Interpretation of formula (2.89) Rozhansky & Tsendin, formula):
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# Coefficient accounting for ratio of electron collisions:
n_C*S_eC*Cea/(n_C*S_eC*Cea + n_e*S_ei*Cei) = 0.123786
Dei := 3*π/32*sqrt(8*kB*T_e/(π*m_e))*1/(n_e*S_ei) = 0.241541 m^2/s  # - diffusion coefficient of electrons in ions
Dea := 3*π/32*sqrt(8*kB*T_e/(π*m_e))*1/(n_C*S_eC + n_He*S_eHe) = 1.97279 m^2/s
D_e := (Dei^-1 + Dea^-1)^-1 = 0.215194 m^2/s  # - diffusion coefficient of electrons
# Reformulating:
D_e := 3*π/32*sqrt(8*kB*T_e/(π*m_e))*1/(n_C*S_eC + n_He*S_eHe + n_e*S_ei) = 0.215194 m^2/s
# More accurate relation from Rozansky & Tsendin (eqn. 2.89):
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# Reformulation using cross-sections:
D_e_acc := 3*π/32*8*kB/π*(T_e/m_e + (T_e + T_h)*sqrt(T_e/m_e)*(n_e*S_ei)/(0.5*sqrt(Cc*m_C + (1 - Cc)*m_He)*sqrt(T_h)*(n_C*S_ia)))/(sqrt(8*kB*T_e/(π*m_e))*(n_C*S_eC + n_He*S_eHe + n_e*S_ei)) = 0.245839 m^2/s
μ_e := D_e*q_e/(kB*T_e) = 0.2495 1/T  # (m^2/(V s))  - mobility of electrons
D_i_a := D_i + μ_i/μ_e*D_e = 0.0110696 m^2/s  # - ambipolar diffusion coefficient
D_C_He := 3*π/32*sqrt(8*kB*T_h*(m_C + m_He)/(π*m_C*m_He))/(n*π*d_a^2) = 0.0102254 m^2/s
# - diffusion coefficient of ions in carbon (assume all atoms are carbon)
# Thermal conductivity:
λei := 3.20*kB*n_e*Dei/Cei = 1.01668 kg*m/(K*s^3)  # - (formula from Almeida)
λea := C_therm*kB*n*Dea/Cea = 64.7271 kg*m/(K*s^3)  # - (formula from Almeida)
λe := 1/(1/λea + 1/λei) = 1.00096 kg*m/(K*s^3)  # - electron thermal conductivity
S_aa := π*d_a^2
λa := 75*kB/(64*S_aa)*sqrt(π*kB*T_h)*(1/sqrt(m_C) + 1/sqrt(m_He))*(1 + n_Saha/n_a)^-1 = 0.567023 kg*m/(K*s^3)
λi := 75*kB*n_Saha/(64*S_ia*n_a)*sqrt(π*kB*T_h/m_C)*(1 + n_Saha/n_a)^-1 = 0.00840336 kg*m/(K*s^3)
λh := λa + λi  # - gas thermal conductivity
# Conductivity and Joule heating:
σ := μ_e*q_e*n_Saha = 1902.5 A^2*s^3/(kg*m^3)  # (1/(Ω*m))
q_J := j^2/σ = 4.73062e9 kg/(m*s^3)  # (W/m3)  (assumming no electron diffusion)
# Plasma cahracteristic lengths:
R_D = 3.16391e-8 m  # - Debye radius in plasma
# Mean free paths of different particles:
l_a := 1/(sqrt(2)*π*d_a^2*n) = 3.50626e-6 m  # - mean free path of atoms
l_i := 1/(sqrt(2)*S_ia*n) = 1.98274e-6 m  # - mean free path of ions (assume all atoms are carbon)
l_e := 1/(sqrt(2)*(S_eC*n_C + S_eHe*n_He + S_ei*n_Saha)) = 8.31846e-7 m  # - mean free path of electrons
# Characteristic relaxation lengths:
L_c_d := D_C_He/v = 0.00102254 m  # - diffusion VS convection characteristic length
# Ionization equilibrium relaxation length:
# Simplified ion transport eqn. (diffusion + net generation):
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# Linearization near equilibrium:
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L_ion := sqrt(D_i_a/(2*a_i_C*n)) = 7.378e-6 m  # - Saha equilibrium relaxation length
# Electron temperature relaxation length:
# Electron temperature eqn.:
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A_e_H := 16*sqrt(m_e*kB*T_e/(2*π))*n_Saha/m_C*(n_C*S_eC + n_He*S_eHe + n_Saha*S_ei)*kB = 63039204 kg/(K*m*s^3)
# - electron-heavy heat exchange coefficient
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# Near LTE:
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L_T_diff := sqrt(λe/A_e_H) = 0.000126009 m  # - electron temperature relaxation length scale (diffusion VS e-h heat exchange)
L_T_conv := 2.5*kB*j/(2*A_e_H*q_e) = 5.13074e-6 m  # - electron temperature relaxation length scale (convection VS e-h heat exchange)
L_T := max(L_T_diff, L_T_conv) = 0.000126009 m  # - electron temperature relaxation length
# Gas temperature relaxation length:
L_T_h := sqrt(λh/A_e_H) = 9.55409e-5 m  # - gas temperature relaxation length
# Thermal velocities and collision frequencies:
v_C := sqrt(8*kB*T_h/(π*m_C)) = 3500.84 m/s  # - Carbon atoms thermal velocity
v_He := sqrt(8*kB*T_h/(π*m_He)) = 6063.63 m/s  # - Helium atoms thermal velocity
v_e := sqrt(8*kB*T_e/(π*m_e)) = 621084 m/s  # - electrons thermal velocity
ν_a := v_C/l_a = 998453238 1/s  # - atom-atoms collision frequency
ν_i := v_C/l_i = 1.76565e9 1/s  # - ion-atoms collision frequency
ν_e := v_e/l_e = 7.46633e11 1/s  # - electron collision frequency
ν_e_a := v_e*sqrt(2)*(S_eC*n_C + S_eHe*n_He) = 8.14436e10 1/s  # - electron-atoms collision frequency
ν_e_i := v_e*(sqrt(2)*S_ei*n_Saha) = 6.6519e11 1/s  # - electron-ions collision frequency
# Sheath voltage and current composition (for collisionlaess sheath):
# Input parameter:
T_w := 3900 K  # - wall temperature
# Input parameter:
n_e := n_Saha/10  # - electron (ion) number density at plasma-sheath edge
# Input parameter:
j := 3*10^6*A/m^2  # - current density
A_R := 1.2*10^6*A/(m^2*K^2)
V_w := 4.6 V  # - work function of graphite
# - assuming positive sheath:
j_e_p := n_e*q_e*sqrt(8*kB*T_e/(π*m_e)) = 473592261 A/m^2  # - electrons from plasma current density
j_diff(V_sh) := j + j_e_p - n_e*q_e*sqrt(8*kB*T_h/(π*m_C))*exp(-q_e*V_sh/(kB*T_h)) - A_R*T_w^2*exp(-q_e*(V_w + V_sh)/(kB*T_w))
V_sh_guess := 0 V
V_sh_positive := root(j_diff(V_sh_guess), V_sh_guess) = -1.03948 V  # - sheath voltage drop
n_e*q_e*sqrt(8*kB*T_h/(π*m_C))*exp(-q_e*V_sh_positive/(kB*T_h)) = 14933334 A/m^2  # - ion current demsity
A_R*T_w^2*exp(-q_e*(V_w + V_sh_positive)/(kB*T_w)) = 461658927 A/m^2
# - assuming negative sheath:
j_i := n_e*q_e*sqrt(kB*(T_h + T_e)/m_C) = 2606943 A/m^2
# - ion current density
# (Bohm's criterion)
j_em := A_R*T_w^2*exp(-q_e*V_w/(kB*T_w)) = 21001031 A/m^2  # - emission current density
V_sh_negative := kB*T_e/q_e*ln((j_i + j_em - j)/(n_e*q_e*sqrt(8*kB*T_e/(π*m_e)))) = -2.70365 V  # - sheath voltage drop
n_e*q_e*sqrt(8*kB*T_e/(π*m_e))*exp(q_e*V_sh_negative/(kB*T_h)) = 5377635 A/m^2  # - electrons from plasma current density
